# 2.8. Расчет на прочность диска рабочего колеса первой ступени ТВД
# Расчет будем производить методом двух расчетов. Этот метод подходит для прочностного расчета дисков произвольного профиля. На основе реальной формы профиля диска строится его упрощенная расчетная схема. Затем профиль расчетной схемы заменяется ступенчатых профилем, разбивается на участки постоянной толщины. К нижнему и верхнему краю расчетной схемы прикладываются силы, зависящие от силы инерции лопаток и посадки диска на вал.
#
# Определим силу на ободе диска:
#
# Частота вращения ТВД:
n_твд := 14750
n_твд = 14750  # об/мин
# Плотность материала лопаток ХН67МВТЮ:
n_твд := 10000
r''_11 := 0.348
ρ_л := 7.772*10^3  # кг/м^3
ORIGIN := 1
# Примем температуры на нижнем и верхнем радиусах диска в первом приближении:
z := 115
r_11 := 0.305
T_1 := 650  # К
T_m := 900  # К
r'_11 := 0.237
# Число рабочих лопаток первой ступени:
z = 115
# Нагрузка на наружном ободе диска:
f_л := [107.1*10^-6; 175.4*10^-6; 348.5*10^-6]  # м^2
p_m == p'_m + p''_m == z*P_пр/(2*π*r_m*h_m1) + ρ_л*ω_твд^2*r_0*δ*h_ср/h_m1
l_л1 := 60
ω_твд := 2*π*n_твд/60 = 1047.2  # рад/с
χ_рк := f_л[1]/f_л[3] = 0.307317
# Геометрические параметры диска:
r_m := 304*10^-3  # м
λ_рк := 2*r_11/l_л1 explicit, ALL → 2*0.305/60 = 0.0101667
n_рк := ln((f_л[2] - f_л[1])/(f_л[3] - f_л[1]))/ln((r''_11 - r_11)/(r''_11 - r'_11)) = 1.33134
h_m1 := 50*10^-3  # м
r_0 := 304*10^-3  # м
# Изменение площади сечения лопатки по высоте:
δ := 25*10^-3  # м
h_ср := 50*10^-3  # м
r_1 := 90*10^-3  # м
# Сила инерции лопатки в корневом сечении:
f_рк(r) := f_л[3]*(χ_рк + (1 - χ_рк)*((r''_11 - r)/(r''_11 - r'_11))^n_рк)
N_л(r) := ρ_л*ω_твд^2*integral(r*f_рк(r), r = r .. r''_11)
ω_твд := round(ω_твд, 3) = 1047.2
N_л(r'_11) = 56116.9  # Н
P_пр := N_л(r'_11) = 56116.9  # Н
# Нагрузка на контуре диска при замковом соединении ёлочного типа (коэффициент 3/4 вводится для того, чтобы приближительно учесть то, что замок охлаждаемой лопатки - полый):
P_пр := round(P_пр, 3) = 56116.9
p_m == p'_m + p''_m
p_m := z*P_пр/(2*π*r_m*h_m1) + ρ_л*ω_твд^2*r_0*δ*h_ср/h_m1*3/4
p'_m := z*P_пр/(2*π*r_m*h_m1) explicit, ALL → 115*56116.941/(2*π*304*10^-3*50*10^-3) = 67572249  # Па
p''_m := ρ_л*ω_твд^2*r_0*δ*h_ср/h_m1*3/4
p'_m := round(p'_m, 3) = 67572249
p''_m explicit, ALL → 7.772*10^3*1047.198^2*304*10^-3*25*10^-3*50*10^-3/(50*10^-3)*3/4 = 48580866  # Па
p''_m := round(p''_m, 3) = 48580866
p_m := p'_m + p''_m explicit, ALL → 67572248.908 + 48580866.398 = 116153115  # Па
p_m/10^6 = 116.153  # МПа
# Материал диска ХН67МВТЮ - используется для дисков высокотемпературных турбин. Его плотность:
ρ := 8200  # кг/м^3
# Параметры этого материала:
# Модуль упругости:
T_1 = 650  # К
E_1 := 1.63*10^11  # Па
T_m = 900  # К
E_m := 1.56*10^11  # Па
# Принимаем линейную зависимость модуля упругости по радиусу:
E(r) := E_1 + (E_m - E_1)*(r - r_1)/(r_m - r_1)
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# Температура по радиусу изменяется по параболическому закону:
T_r(r) := T_1 + (T_m - T_1)*((r - r_1)/(r_m - r_1))^2
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# Коэффициент линейного расширения изменяется по линейному закону:
α_1 := 17*10^-6
1/К
α_m := 20*10^-6
1/К
α(r) := α_1 + (α_m - α_1)*(r - r_1)/(r_m - r_1)
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# Коэффициент поперечной деформации (принимаем постоянным по радиусу):
μ := 0.33
T_0 := 300  # К
# Относительная температурная деформация:
θ(r) := α(r)*(T_r(r) - T_0)
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# Профиль разбивается на 20 участков. Параметры ступенчатого профиля:
# Толщины профиля на границах участков:
i := 1, 2 .. 19
# Ширина участков:
h1 := [
    80*10^-3;
    80*10^-3;
    76.54*10^-3;
    66.14*10^-3;
    55.75*10^-3;
    45.47*10^-3;
    40.44*10^-3;
    38.86*10^-3;
    37.29*10^-3;
    35.72*10^-3;
    34.14*10^-3;
    32.57*10^-3;
    31*10^-3;
    27.84*10^-3;
    24.69*10^-3;
    23.12*10^-3;
    21.54*10^-3;
    26.39*10^-3;
    26.39*10^-3;
    26.39*10^-3
] = [0.08; 0.08; 0.07654; 0.06614; 0.05575; 0.04547; 0.04044; 0.03886; 0.03729; 0.03572; 0.03414; 0.03257; 0.031; 0.02784; 0.02469; 0.02312; 0.02154; 0.02639; 0.02639; 0.02639]
h[i] := (h1[i + 1] + h1[i])/2
h = [0.08; 0.07827; 0.07134; 0.060945; 0.05061; 0.042955; 0.03965; 0.038075; 0.036505; 0.03493; 0.033355; 0.031785; 0.02942; 0.026265; 0.023905; 0.02233; 0.023965; 0.02639; 0.02639]
# Радиусы нижних границ участков:
r := [
    r_1;
    124*10^-3;
    133*10^-3;
    142*10^-3;
    151*10^-3;
    160*10^-3;
    169*10^-3;
    178*10^-3;
    187*10^-3;
    196*10^-3;
    205*10^-3;
    214*10^-3;
    223*10^-3;
    241*10^-3;
    259*10^-3;
    268*10^-3;
    277*10^-3;
    286*10^-3;
    295*10^-3;
    r_m
] = [0.09; 0.124; 0.133; 0.142; 0.151; 0.16; 0.169; 0.178; 0.187; 0.196; 0.205; 0.214; 0.223; 0.241; 0.259; 0.268; 0.277; 0.286; 0.295; 0.304]
# Средние радиусы участков:
r_ср[i] := (r[i + 1] + r[i])/2
r_ср = [0.107; 0.1285; 0.1375; 0.1465; 0.1555; 0.1645; 0.1735; 0.1825; 0.1915; 0.2005; 0.2095; 0.2185; 0.232; 0.25; 0.2635; 0.2725; 0.2815; 0.2905; 0.2995]
# Основные формулы и алгоритм метода двух расчетов:
# 1. Граничные условия:
# Напряжение растяжения на нижнем радиусе диска со свободной посадкой:
σ_r11 == 0  # МПа
# Напряжение растяжения на ободе диска:
σ_r1920 == p_m
p_m = 116153115  # Па
# 2. Задаемся касательным напряжением:
σ_t11 := 150*10^6  # Па
# 3. Последовательно рассчитываются все участки начиная от нижнего:
S == σ_r + σ_t
D == σ_t - σ_r
# Изменение параметров при переходе от нижней границы участка к верхней:
S_i.i1(S_ii, r_i1, r_i, r_срi) := S_ii - (1 + μ)/2*ρ*ω_твд^2*(r_i1^2 - r_i^2) - E(r_срi)*(θ(r_i1) - θ(r_i))
D_i.i1(D_ii, r_i1, r_i, r_срi) := D_ii*r_i^2/r_i1^2 + (1 - μ)/4*ρ*ω_твд^2*(r_i1^2 - r_i^4/r_i1^2) + (2*E(r_срi)/r_i1^2*integral(θ(r)*r, r = r_i .. r_i1) - E(r_срi)*(θ(r_i1) - θ(r_i)*r_i^2/r_i1^2))
# Изменение параметров при переходе границы между участками:
S_i1.i1(S_i.i1, D_i.i1, r_срi1, r_срi, h_i1, h_i) := 1/2*((1 + μ)*h_i/h_i1 + (1 - μ)*E(r_срi1)/E(r_срi))*S_i.i1 + 1/2*((1 + μ)*E(r_срi1)/E(r_срi) - (1 + μ))*D_i.i1
S_i1.i1(S_i.i1, D_i.i1, r_срi1, r_срi, h_i1, h_i) := 1/2*(((1 + μ)*h_i/h_i1 + (1 - μ)*E(r_срi1)/E(r_срi))*S_i.i1 + ((1 + μ)*E(r_срi1)/E(r_срi) - (1 + μ))*D_i.i1)
D_i1.i1(S_i.i1, D_i.i1, r_срi1, r_срi, h_i1, h_i) := 1/2*((1 - μ)*E(r_срi1)/E(r_срi) - (1 - μ)*h_i/h_i1)*S_i.i1 + 1/2*((1 + μ)*E(r_срi1)/E(r_срi) + (1 - μ)*h_i/h_i1)*D_i.i1
D_i1.i1(S_i.i1, D_i.i1, r_срi1, r_срi, h_i1, h_i) := 1/2*(((1 - μ)*E(r_срi1)/E(r_срi) - (1 - μ)*h_i/h_i1)*S_i.i1 + ((1 + μ)*E(r_срi1)/E(r_срi) + (1 - μ)*h_i/h_i1)*D_i.i1)
# 4. Производится второй расчет. Диск считается неподвижным, температурные деформации приравниваются к нулю. Производится последовательный расчет по участкам по упрощенным формулам:
θ == 0
ω == 0
D_i.i1.2(D_ii, r_i1, r_i) == D_ii*r_i^2/r_i1^2
S_i.i1.2(S_ii) == S_ii
S_i1.i1.2(S_i.i1, D_i.i1, r_срi1, r_срi, h_i1, h_i) == 1/2*((1 + μ)*h_i/h_i1 + (1 - μ)*E(r_срi1)/E(r_срi))*S_i.i1 + 1/2*((1 + μ)*E(r_срi1)/E(r_срi) - (1 + μ))*D_i.i1
D_i1.i1.2(S_i.i1, D_i.i1, r_срi1, r_срi, h_i1, h_i) == 1/2*((1 - μ)*E(r_срi1)/E(r_срi) - (1 - μ)*h_i/h_i1)*S_i.i1 + 1/2*((1 + μ)*E(r_срi1)/E(r_срi) + (1 - μ)*h_i/h_i1)*D_i.i1
# 5. Рассчитывается коэффициент изменения второго расчета:
k == (p_m - σ_r1920)/σ_r1920.2
# 6. Напряжения определяются по формулам:
σ_r.ij == σ_r.ij + k*σ_r.ij.2
σ_t.ij == σ_t.ij + k*σ_t.ij.2
# 7. Эквивалентные напряжения:
σ_экв == max(σ[r], σ[t], 0) - min(σ[r], σ[t], 0)
# Подробный расчет приведен в приложении 4. Результаты расчета приведены в таблице. По результатам расчета построены эпюры касательных, радиальных и эквивалентных напряжений (см. рис. 16).
# Расчет диска на прочность методом двух расчетов.
#
# Первый расчет:
# Изменение параметров при переходе от нижней границы участка к верхней:
S_i.i1(S_ii, r_i1, r_i, r_срi) := S_ii - (1 + μ)/2*ρ*ω_твд^2*(r_i1^2 - r_i^2) - E(r_срi)*(θ(r_i1) - θ(r_i))
D_i.i1(D_ii, r_i1, r_i, r_срi) := D_ii*r_i^2/r_i1^2 + (1 - μ)/4*ρ*ω_твд^2*(r_i1^2 - r_i^4/r_i1^2) + (2*E(r_срi)/r_i1^2*integral(θ(r)*r, r = r_i .. r_i1) - E(r_срi)*(θ(r_i1) - θ(r_i)*r_i^2/r_i1^2))
# Изменение параметров при переходе границы между участками:
S_i1.i1(S_i.i1, D_i.i1, r_срi1, r_срi, h_i1, h_i) := 1/2*((1 + μ)*h_i/h_i1 + (1 - μ)*E(r_срi1)/E(r_срi))*S_i.i1 + 1/2*((1 + μ)*E(r_срi1)/E(r_срi) - (1 + μ))*D_i.i1
D_i1.i1(S_i.i1, D_i.i1, r_срi1, r_срi, h_i1, h_i) := 1/2*((1 - μ)*E(r_срi1)/E(r_срi) - (1 - μ)*h_i/h_i1)*S_i.i1 + 1/2*((1 + μ)*E(r_срi1)/E(r_срi) + (1 - μ)*h_i/h_i1)*D_i.i1
# 1 участок:
σ_r11 := 0  # МПа
# Зададимся касательным напряжением:
σ_t11 := 150*10^6  # Па
S_11 := σ_r11 + σ_t11 = 150000000  # Па
D_11 := σ_t11 - σ_r11 = 150000000  # Па
S_12 := S_i.i1(S_11, r[2], r[1], r_ср[1]) = 61475429  # Па
D_12 := D_i.i1(D_11, r[2], r[1], r_ср[1]) = 60518658  # Па
σ_t12 := (S_12 + D_12)/2 = 60997043  # Па
σ_r12 := (S_12 - D_12)/2 = 478386  # Па
# 2:
S_22 := S_i1.i1(S_12, D_12, r_ср[2], r_ср[1], h[2], h[1]) = 62115632  # Па
D_22 := D_i1.i1(S_12, D_12, r_ср[2], r_ср[1], h[2], h[1]) = 60248181  # Па
S_23 := S_i.i1(S_22, r[3], r[2], r_ср[2]) = 30242317  # Па
D_23 := D_i.i1(D_22, r[3], r[2], r_ср[2]) = 42004850  # Па
σ_t22 := (S_22 + D_22)/2 = 61181907  # Па
σ_r22 := (S_22 - D_22)/2 = 933726  # Па
σ_t23 := (S_23 + D_23)/2 = 36123584  # Па
σ_r23 := (S_23 - D_23)/2 = -5881267  # Па
# 3:
S_33 := S_i1.i1(S_23, D_23, r_ср[3], r_ср[2], h[3], h[2]) = 32126639  # Па
D_33 := D_i1.i1(S_23, D_23, r_ср[3], r_ср[2], h[3], h[2]) = 42318344  # Па
S_34 := S_i.i1(S_33, r[4], r[3], r_ср[3]) = -3367971  # Па
D_34 := D_i.i1(D_33, r[4], r[3], r_ср[3]) = 24683998  # Па
σ_t33 := (S_33 + D_33)/2 = 37222492  # Па
σ_r33 := (S_33 - D_33)/2 = -5095853  # Па
σ_t34 := (S_34 + D_34)/2 = 10658013  # Па
σ_r34 := (S_34 - D_34)/2 = -14025984  # Па
# 4:
S_44 := S_i1.i1(S_34, D_34, r_ср[4], r_ср[3], h[4], h[3]) = -3777857  # Па
D_44 := D_i1.i1(S_34, D_34, r_ср[4], r_ср[3], h[4], h[3]) = 26258979  # Па
S_45 := S_i.i1(S_44, r[5], r[4], r_ср[4]) = -42937911  # Па
D_45 := D_i.i1(D_44, r[5], r[4], r_ср[4]) = 8655231  # Па
σ_t44 := (S_44 + D_44)/2 = 11240561  # Па
σ_r44 := (S_44 - D_44)/2 = -15018418  # Па
σ_t45 := (S_45 + D_45)/2 = -17141340  # Па
σ_r45 := (S_45 - D_45)/2 = -25796571  # Па
# 5:
S_55 := S_i1.i1(S_45, D_45, r_ср[5], r_ср[4], h[5], h[4]) = -48753063  # Па
D_55 := D_i1.i1(S_45, D_45, r_ср[5], r_ср[4], h[5], h[4]) = 12200475  # Па
S_56 := S_i.i1(S_55, r[6], r[5], r_ср[5]) = -91622415  # Па
D_56 := D_i.i1(D_55, r[6], r[5], r_ср[5]) = -5877550  # Па
σ_t55 := (S_55 + D_55)/2 = -18276294  # Па
σ_r55 := (S_55 - D_55)/2 = -30476769  # Па
σ_t56 := (S_56 + D_56)/2 = -48749982  # Па
σ_r56 := (S_56 - D_56)/2 = -42872433  # Па
# 6:
S_66 := S_i1.i1(S_56, D_56, r_ср[6], r_ср[5], h[6], h[5]) = -102417214  # Па
D_66 := D_i1.i1(S_56, D_56, r_ср[6], r_ср[5], h[6], h[5]) = -695231  # Па
S_67 := S_i.i1(S_66, r[7], r[6], r_ср[6]) = -149039421  # Па
D_67 := D_i.i1(D_66, r[7], r[6], r_ср[6]) = -19593632  # Па
σ_t66 := (S_66 + D_66)/2 = -51556222  # Па
σ_r66 := (S_66 - D_66)/2 = -50860991  # Па
σ_t67 := (S_67 + D_67)/2 = -84316527  # Па
σ_r67 := (S_67 - D_67)/2 = -64722894  # Па
# 7:
S_77 := S_i1.i1(S_67, D_67, r_ср[7], r_ср[6], h[7], h[6]) = -157185338  # Па
D_77 := D_i1.i1(S_67, D_67, r_ср[7], r_ср[6], h[7], h[6]) = -15863593  # Па
S_78 := S_i.i1(S_77, r[8], r[7], r_ср[7]) = -207603664  # Па
D_78 := D_i.i1(D_77, r[8], r[7], r_ср[7]) = -35544884  # Па
σ_t77 := (S_77 + D_77)/2 = -86524465  # Па
σ_r77 := (S_77 - D_77)/2 = -70660873  # Па
σ_t78 := (S_78 + D_78)/2 = -121574274  # Па
σ_r78 := (S_78 - D_78)/2 = -86029390  # Па
# 8:
S_88 := S_i1.i1(S_78, D_78, r_ср[8], r_ср[7], h[8], h[7]) = -213143301  # Па
D_88 := D_i1.i1(S_78, D_78, r_ср[8], r_ср[7], h[8], h[7]) = -32989408  # Па
S_89 := S_i.i1(S_88, r[9], r[8], r_ср[8]) = -267400712  # Па
D_89 := D_i.i1(D_88, r[9], r[8], r_ср[8]) = -53456812  # Па
σ_t88 := (S_88 + D_88)/2 = -123066355  # Па
σ_r88 := (S_88 - D_88)/2 = -90076946  # Па
σ_t89 := (S_89 + D_89)/2 = -160428762  # Па
σ_r89 := (S_89 - D_89)/2 = -106971950  # Па
# 9:
S_99 := S_i1.i1(S_89, D_89, r_ср[9], r_ср[8], h[9], h[8]) = -274818156  # Па
D_99 := D_i1.i1(S_89, D_89, r_ср[9], r_ср[8], h[9], h[8]) = -50144124  # Па
S_910 := S_i.i1(S_99, r[10], r[9], r_ср[9]) = -332957324  # Па
D_910 := D_i.i1(D_99, r[10], r[9], r_ср[9]) = -71578981  # Па
σ_t910 := (S_910 + D_910)/2 = -202268152  # Па
σ_t99 := (S_99 + D_99)/2 = -162481140  # Па
σ_r99 := (S_99 - D_99)/2 = -112337016  # Па
σ_r910 := (S_910 - D_910)/2 = -130689172  # Па
# 10:
S_1010 := S_i1.i1(S_910, D_910, r_ср[10], r_ср[9], h[10], h[9]) = -342647641  # Па
D_1010 := D_i1.i1(S_910, D_910, r_ср[10], r_ср[9], h[10], h[9]) = -67337407  # Па
S_1011 := S_i.i1(S_1010, r[11], r[10], r_ср[10]) = -404710940  # Па
D_1011 := D_i.i1(D_1010, r[11], r[10], r_ср[10]) = -89902095  # Па
σ_t1010 := (S_1010 + D_1010)/2 = -204992524  # Па
σ_t1011 := (S_1011 + D_1011)/2 = -247306517  # Па
σ_r1010 := (S_1010 - D_1010)/2 = -137655117  # Па
σ_r1011 := (S_1011 - D_1011)/2 = -157404422  # Па
# 11:
S_1111 := S_i1.i1(S_1011, D_1011, r_ср[11], r_ср[10], h[11], h[10]) = -417058358  # Па
D_1111 := D_i1.i1(S_1011, D_1011, r_ср[11], r_ср[10], h[11], h[10]) = -84561457  # Па
S_1112 := S_i.i1(S_1111, r[12], r[11], r_ср[11]) = -483087870  # Па
D_1112 := D_i.i1(D_1111, r[12], r[11], r_ср[11]) = -108403904  # Па
σ_t1111 := (S_1111 + D_1111)/2 = -250809908  # Па
σ_t1112 := (S_1112 + D_1112)/2 = -295745887  # Па
σ_r1111 := (S_1111 - D_1111)/2 = -166248451  # Па
σ_r1112 := (S_1112 - D_1112)/2 = -187341983  # Па
# 12:
S_1212 := S_i1.i1(S_1112, D_1112, r_ср[12], r_ср[11], h[12], h[11]) = -498523114  # Па
D_1212 := D_i1.i1(S_1112, D_1112, r_ср[12], r_ср[11], h[12], h[11]) = -101771100  # Па
S_1213 := S_i.i1(S_1212, r[13], r[12], r_ср[12]) = -568560622  # Па
D_1213 := D_i.i1(D_1212, r[13], r[12], r_ср[12]) = -127029974  # Па
σ_t1212 := (S_1212 + D_1212)/2 = -300147107  # Па
σ_t1213 := (S_1213 + D_1213)/2 = -347795298  # Па
σ_r1212 := (S_1212 - D_1212)/2 = -198376007  # Па
σ_r1213 := (S_1213 - D_1213)/2 = -220765324  # Па
# 13:
S_1313 := S_i1.i1(S_1213, D_1213, r_ср[13], r_ср[12], h[13], h[12]) = -598189982  # Па
D_1313 := D_i1.i1(S_1213, D_1213, r_ср[13], r_ср[12], h[13], h[12]) = -114375065  # Па
S_1314 := S_i.i1(S_1313, r[14], r[13], r_ср[13]) = -750457637  # Па
D_1314 := D_i.i1(D_1313, r[14], r[13], r_ср[13]) = -169602900  # Па
σ_t1313 := (S_1313 + D_1313)/2 = -356282523  # Па
σ_t1314 := (S_1314 + D_1314)/2 = -460030268  # Па
σ_r1313 := (S_1313 - D_1313)/2 = -241907458  # Па
σ_r1314 := (S_1314 - D_1314)/2 = -290427368  # Па
# 14:
S_1414 := S_i1.i1(S_1314, D_1314, r_ср[14], r_ср[13], h[14], h[13]) = -809050855  # Па
D_1414 := D_i1.i1(S_1314, D_1314, r_ср[14], r_ср[13], h[14], h[13]) = -144874729  # Па
S_1415 := S_i.i1(S_1414, r[15], r[14], r_ср[14]) = -977844616  # Па
D_1415 := D_i.i1(D_1414, r[15], r[14], r_ср[14]) = -207461776  # Па
σ_t1414 := (S_1414 + D_1414)/2 = -476962792  # Па
σ_t1415 := (S_1415 + D_1415)/2 = -592653196  # Па
σ_r1414 := (S_1414 - D_1414)/2 = -332088063  # Па
σ_r1415 := (S_1415 - D_1415)/2 = -385191420  # Па
# 15:
S_1515 := S_i1.i1(S_1415, D_1415, r_ср[15], r_ср[14], h[15], h[14]) = -1.04074e9  # Па
D_1515 := D_i1.i1(S_1415, D_1415, r_ср[15], r_ср[14], h[15], h[14]) = -180680180  # Па
S_1516 := S_i.i1(S_1515, r[16], r[15], r_ср[15]) = -1.13143e9  # Па
D_1516 := D_i.i1(D_1515, r[16], r[15], r_ср[15]) = -215212652  # Па
σ_t1515 := (S_1515 + D_1515)/2 = -610709375  # Па
σ_t1516 := (S_1516 + D_1516)/2 = -673322565  # Па
σ_r1515 := (S_1515 - D_1515)/2 = -430029195  # Па
σ_r1516 := (S_1516 - D_1516)/2 = -458109913  # Па
# 16:
S_1616 := S_i1.i1(S_1516, D_1516, r_ср[16], r_ср[15], h[16], h[15]) = -1.18352e9  # Па
D_1616 := D_i1.i1(S_1516, D_1516, r_ср[16], r_ср[15], h[16], h[15]) = -192586666  # Па
S_1617 := S_i.i1(S_1616, r[17], r[16], r_ср[16]) = -1.27847e9  # Па
D_1617 := D_i.i1(D_1616, r[17], r[16], r_ср[16]) = -229496152  # Па
σ_t1616 := (S_1616 + D_1616)/2 = -688055616  # Па
σ_t1617 := (S_1617 + D_1617)/2 = -753983561  # Па
σ_r1616 := (S_1616 - D_1616)/2 = -495468950  # Па
σ_r1617 := (S_1617 - D_1617)/2 = -524487409  # Па
# 17:
S_1717 := S_i1.i1(S_1617, D_1617, r_ср[17], r_ср[16], h[17], h[16]) = -1.21938e9  # Па
D_1717 := D_i1.i1(S_1617, D_1617, r_ср[17], r_ср[16], h[17], h[16]) = -252381640  # Па
S_1718 := S_i.i1(S_1717, r[18], r[17], r_ср[17]) = -1.31862e9  # Па
D_1718 := D_i.i1(D_1717, r[18], r[17], r_ср[17]) = -288766030  # Па
σ_t1717 := (S_1717 + D_1717)/2 = -735880122  # Па
σ_t1718 := (S_1718 + D_1718)/2 = -803691624  # Па
σ_r1717 := (S_1717 - D_1717)/2 = -483498482  # Па
σ_r1718 := (S_1718 - D_1718)/2 = -514925594  # Па
# 18:
S_1818 := S_i1.i1(S_1718, D_1718, r_ср[18], r_ср[17], h[18], h[17]) = -1.23685e9  # Па
D_1818 := D_i1.i1(S_1718, D_1718, r_ср[18], r_ср[17], h[18], h[17]) = -319278009  # Па
S_1819 := S_i.i1(S_1818, r[19], r[18], r_ср[18]) = -1.34042e9  # Па
D_1819 := D_i.i1(D_1818, r[19], r[18], r_ср[18]) = -354950727  # Па
σ_t1818 := (S_1818 + D_1818)/2 = -778063768  # Па
σ_t1819 := (S_1819 + D_1819)/2 = -847685248  # Па
σ_r1818 := (S_1818 - D_1818)/2 = -458785759  # Па
σ_r1819 := (S_1819 - D_1819)/2 = -492734521  # Па
# 19:
S_1919 := S_i1.i1(S_1819, D_1819, r_ср[19], r_ср[18], h[19], h[18]) = -1.33913e9  # Па
D_1919 := D_i1.i1(S_1819, D_1819, r_ср[19], r_ср[18], h[19], h[18]) = -353661535  # Па
S_1920 := S_i.i1(S_1919, r[20], r[19], r_ср[19]) = -1.44707e9  # Па
D_1920 := D_i.i1(D_1919, r[20], r[19], r_ср[19]) = -390766350  # Па
σ_t1919 := (S_1919 + D_1919)/2 = -846396056  # Па
σ_t1920 := (S_1920 + D_1920)/2 = -918918961  # Па
σ_r1919 := (S_1919 - D_1919)/2 = -492734521  # Па
σ_r1920 := (S_1920 - D_1920)/2 = -528152611  # Па
# Второй расчет:
θ := 0
ω := 0
D_i.i1.2(D_ii, r_i1, r_i) := D_ii*r_i^2/r_i1^2
S_i.i1.2(S_ii) := S_ii
S_i1.i1.2(S_i.i1, D_i.i1, r_срi1, r_срi, h_i1, h_i) := (1/2*((1 + μ)*h_i/h_i1 + (1 - μ)*E(r_срi1)/E(r_срi))*S_i.i1 + 1/2*((1 + μ)*E(r_срi1)/E(r_срi) - (1 + μ))*D_i.i1)
D_i1.i1.2(S_i.i1, D_i.i1, r_срi1, r_срi, h_i1, h_i) := (1/2*((1 - μ)*E(r_срi1)/E(r_срi) - (1 - μ)*h_i/h_i1)*S_i.i1 + 1/2*((1 + μ)*E(r_срi1)/E(r_срi) + (1 - μ)*h_i/h_i1)*D_i.i1)
# 1
σ_r11.2 := 0  # Па
σ_t11.2 := 150*10^6  # Па
S_11.2 := σ_r11.2 + σ_t11.2 = 150000000  # Па
D_11.2 := σ_t11.2 - σ_r11.2 = 150000000  # Па
S_12.2 := S_11.2 = 150000000  # Па
D_12.2 := D_i.i1.2(D_11.2, r[2], r[1]) = 79019251  # Па
σ_t12.2 := (S_12.2 + D_12.2)/2 = 114509625  # Па
σ_r12.2 := (S_12.2 - D_12.2)/2 = 35490375  # Па
# 2
S_22.2 := S_i1.i1.2(S_12.2, D_12.2, r_ср[2], r_ср[1], h[2], h[1]) = 151759728  # Па
D_22.2 := D_i1.i1.2(S_12.2, D_12.2, r_ср[2], r_ср[1], h[2], h[1]) = 78048630  # Па
S_23.2 := S_22.2 = 151759728  # Па
D_23.2 := D_i.i1.2(D_22.2, r[3], r[2]) = 67843051  # Па
σ_t22.2 := (S_22.2 + D_22.2)/2 = 114904179  # Па
σ_t23.2 := (S_23.2 + D_23.2)/2 = 109801390  # Па
σ_r22.2 := (S_22.2 - D_22.2)/2 = 36855549  # Па
σ_r23.2 := (S_23.2 - D_23.2)/2 = 41958338  # Па
3
S_33.2 := S_i1.i1.2(S_23.2, D_23.2, r_ср[3], r_ср[2], h[3], h[2]) = 161388511  # Па
D_33.2 := D_i1.i1.2(S_23.2, D_23.2, r_ср[3], r_ср[2], h[3], h[2]) = 64937577  # Па
S_34.2 := S_33.2 = 161388511  # Па
D_34.2 := D_i.i1.2(D_33.2, r[4], r[3]) = 56966912  # Па
σ_t33.2 := (S_33.2 + D_33.2)/2 = 113163044  # Па
σ_t34.2 := (S_34.2 + D_34.2)/2 = 109177711  # Па
σ_r33.2 := (S_33.2 - D_33.2)/2 = 48225467  # Па
σ_r34.2 := (S_34.2 - D_34.2)/2 = 52210800  # Па
4
S_44.2 := S_i1.i1.2(S_34.2, D_34.2, r_ср[4], r_ср[3], h[4], h[3]) = 179526307  # Па
D_44.2 := D_i1.i1.2(S_34.2, D_34.2, r_ср[4], r_ср[3], h[4], h[3]) = 50832721  # Па
S_45.2 := S_44.2 = 179526307  # Па
D_45.2 := D_i.i1.2(D_44.2, r[5], r[4]) = 44953773  # Па
σ_t44.2 := (S_44.2 + D_44.2)/2 = 115179514  # Па
σ_t45.2 := (S_45.2 + D_45.2)/2 = 112240040  # Па
σ_r44.2 := (S_44.2 - D_44.2)/2 = 64346793  # Па
σ_r45.2 := (S_45.2 - D_45.2)/2 = 67286267  # Па
5
S_55.2 := S_i1.i1.2(S_45.2, D_45.2, r_ср[5], r_ср[4], h[5], h[4]) = 203741279  # Па
D_55.2 := D_i1.i1.2(S_45.2, D_45.2, r_ср[5], r_ср[4], h[5], h[4]) = 35583202  # Па
S_56.2 := S_55.2 = 203741279  # Па
D_56.2 := D_i.i1.2(D_55.2, r[6], r[5]) = 31692680  # Па
σ_t55.2 := (S_55.2 + D_55.2)/2 = 119662241  # Па
σ_t56.2 := (S_56.2 + D_56.2)/2 = 117716979  # Па
σ_r55.2 := (S_55.2 - D_55.2)/2 = 84079038  # Па
σ_r56.2 := (S_56.2 - D_56.2)/2 = 86024300  # Па
6
S_66.2 := S_i1.i1.2(S_56.2, D_56.2, r_ср[6], r_ср[5], h[6], h[5]) = 227723068
D_66.2 := D_i1.i1.2(S_56.2, D_56.2, r_ср[6], r_ср[5], h[6], h[5]) = 21257847
S_67.2 := S_66.2 = 227723068  # Па
D_67.2 := D_i.i1.2(D_66.2, r[7], r[6]) = 19053986  # Па
σ_t66.2 := (S_66.2 + D_66.2)/2 = 124490458  # Па
σ_t67.2 := (S_67.2 + D_67.2)/2 = 123388527  # Па
σ_r66.2 := (S_66.2 - D_66.2)/2 = 103232611  # Па
σ_r67.2 := (S_67.2 - D_67.2)/2 = 104334541  # Па
7
S_77.2 := S_i1.i1.2(S_67.2, D_67.2, r_ср[7], r_ср[6], h[7], h[6]) = 240182800  # Па
D_77.2 := D_i1.i1.2(S_67.2, D_67.2, r_ср[7], r_ср[6], h[7], h[6]) = 13064067  # Па
S_78.2 := S_77.2 = 240182800  # Па
D_78.2 := D_i.i1.2(D_77.2, r[8], r[7]) = 11776379  # Па
σ_t77.2 := (S_77.2 + D_77.2)/2 = 126623433  # Па
σ_t78.2 := (S_78.2 + D_78.2)/2 = 125979590  # Па
σ_r77.2 := (S_77.2 - D_77.2)/2 = 113559367  # Па
σ_r78.2 := (S_78.2 - D_78.2)/2 = 114203210  # Па
8
S_88.2 := S_i1.i1.2(S_78.2, D_78.2, r_ср[8], r_ср[7], h[8], h[7]) = 246627616  # Па
D_88.2 := D_i1.i1.2(S_78.2, D_78.2, r_ср[8], r_ср[7], h[8], h[7]) = 8449052  # Па
S_89.2 := S_88.2 = 246627616  # Па
D_89.2 := D_i.i1.2(D_88.2, r[9], r[8]) = 7655345  # Па
σ_t88.2 := (S_88.2 + D_88.2)/2 = 127538334  # Па
σ_t89.2 := (S_89.2 + D_89.2)/2 = 127141481  # Па
σ_r88.2 := (S_88.2 - D_88.2)/2 = 119089282  # Па
σ_r89.2 := (S_89.2 - D_89.2)/2 = 119486136  # Па
9
S_99.2 := S_i1.i1.2(S_89.2, D_89.2, r_ср[9], r_ср[8], h[9], h[8]) = 253519803  # Па
D_99.2 := D_i1.i1.2(S_89.2, D_89.2, r_ср[9], r_ср[8], h[9], h[8]) = 4050914  # Па
S_910.2 := S_99.2 = 253519803  # Па
D_910.2 := D_i.i1.2(D_99.2, r[10], r[9]) = 3687433  # Па
σ_t99.2 := (S_99.2 + D_99.2)/2 = 128785359  # Па
σ_t910.2 := (S_910.2 + D_910.2)/2 = 128603618  # Па
σ_r99.2 := (S_99.2 - D_99.2)/2 = 124734445  # Па
σ_r910.2 := (S_910.2 - D_910.2)/2 = 124916185  # Па
10
S_1010.2 := S_i1.i1.2(S_910.2, D_910.2, r_ср[10], r_ср[9], h[10], h[9]) = 260960487  # Па
D_1010.2 := D_i1.i1.2(S_910.2, D_910.2, r_ср[10], r_ср[9], h[10], h[9]) = -247438  # Па
S_1011.2 := S_1010.2 = 260960487  # Па
D_1011.2 := D_i.i1.2(D_1010.2, r[11], r[10]) = -226188  # Па
σ_t1010.2 := (S_1010.2 + D_1010.2)/2 = 130356525  # Па
σ_r1010.2 := (S_1010.2 - D_1010.2)/2 = 130603962  # Па
σ_t1011.2 := (S_1011.2 + D_1011.2)/2 = 130367149  # Па
σ_r1011.2 := (S_1011.2 - D_1011.2)/2 = 130593338  # Па
11
S_1111.2 := S_i1.i1.2(S_1011.2, D_1011.2, r_ср[11], r_ср[10], h[11], h[10]) = 268993671  # Па
D_1111.2 := D_i1.i1.2(S_1011.2, D_1011.2, r_ср[11], r_ср[10], h[11], h[10]) = -4518956  # Па
S_1112.2 := S_1111.2 = 268993671  # Па
D_1112.2 := D_i.i1.2(D_1111.2, r[12], r[11]) = -4146849  # Па
σ_t1111.2 := (S_1111.2 + D_1111.2)/2 = 132237358  # Па
σ_r1111.2 := (S_1111.2 - D_1111.2)/2 = 136756313  # Па
σ_t1112.2 := (S_1112.2 + D_1112.2)/2 = 132423411  # Па
σ_r1112.2 := (S_1112.2 - D_1112.2)/2 = 136570260  # Па
12
S_1212.2 := S_i1.i1.2(S_1112.2, D_1112.2, r_ср[12], r_ср[11], h[12], h[11]) = 277667727  # Па
D_1212.2 := D_i1.i1.2(S_1112.2, D_1112.2, r_ср[12], r_ср[11], h[12], h[11]) = -8828184  # Па
S_1213.2 := S_1212.2 = 277667727  # Па
D_1213.2 := D_i.i1.2(D_1212.2, r[13], r[12]) = -8129975  # Па
σ_t1212.2 := (S_1212.2 + D_1212.2)/2 = 134419771  # Па
σ_t1213.2 := (S_1213.2 + D_1213.2)/2 = 134768876  # Па
σ_r1212.2 := (S_1212.2 - D_1212.2)/2 = 143247956  # Па
σ_r1213.2 := (S_1213.2 - D_1213.2)/2 = 142898851  # Па
13
S_1313.2 := S_i1.i1.2(S_1213.2, D_1213.2, r_ср[13], r_ср[12], h[13], h[12]) = 292267564  # Па
D_1313.2 := D_i1.i1.2(S_1213.2, D_1213.2, r_ср[13], r_ср[12], h[13], h[12]) = -16070089  # Па
S_1314.2 := S_1313.2 = 292267564  # Па
D_1314.2 := D_i.i1.2(D_1313.2, r[14], r[13]) = -13759223  # Па
σ_t1313.2 := (S_1313.2 + D_1313.2)/2 = 138098738  # Па
σ_r1313.2 := (S_1313.2 - D_1313.2)/2 = 154168826  # Па
σ_t1314.2 := (S_1314.2 + D_1314.2)/2 = 139254171  # Па
σ_r1314.2 := (S_1314.2 - D_1314.2)/2 = 153013394  # Па
14
S_1414.2 := S_i1.i1.2(S_1314.2, D_1314.2, r_ср[14], r_ср[13], h[14], h[13]) = 315284175  # Па
D_1414.2 := D_i1.i1.2(S_1314.2, D_1314.2, r_ср[14], r_ср[13], h[14], h[13]) = -26404011  # Па
S_1415.2 := S_1414.2 = 315284175  # Па
D_1415.2 := D_i.i1.2(D_1414.2, r[15], r[14]) = -22861486  # Па
σ_t1414.2 := (S_1414.2 + D_1414.2)/2 = 144440082  # Па
σ_r1414.2 := (S_1414.2 - D_1414.2)/2 = 170844093  # Па
σ_t1415.2 := (S_1415.2 + D_1415.2)/2 = 146211345  # Па
σ_r1415.2 := (S_1415.2 - D_1415.2)/2 = 169072831  # Па
15
S_1515.2 := S_i1.i1.2(S_1415.2, D_1415.2, r_ср[15], r_ср[14], h[15], h[14]) = 335729988  # Па
D_1515.2 := D_i1.i1.2(S_1415.2, D_1415.2, r_ср[15], r_ср[14], h[15], h[14]) = -34297914  # Па
S_1516.2 := S_1515.2 = 335729988  # Па
D_1516.2 := D_i.i1.2(D_1515.2, r[16], r[15]) = -32033002  # Па
σ_t1515.2 := (S_1515.2 + D_1515.2)/2 = 150716037  # Па
σ_t1516.2 := (S_1516.2 + D_1516.2)/2 = 151848493  # Па
σ_r1515.2 := (S_1515.2 - D_1515.2)/2 = 185013951  # Па
σ_r1516.2 := (S_1516.2 - D_1516.2)/2 = 183881495  # Па
16
S_1616.2 := S_i1.i1.2(S_1516.2, D_1516.2, r_ср[16], r_ср[15], h[16], h[15]) = 351306601  # Па
D_1616.2 := D_i1.i1.2(S_1516.2, D_1516.2, r_ср[16], r_ср[15], h[16], h[15]) = -40893296  # Па
S_1617.2 := S_1616.2 = 351306601  # Па
D_1617.2 := D_i.i1.2(D_1616.2, r[17], r[16]) = -38279140  # Па
σ_t1616.2 := (S_1616.2 + D_1616.2)/2 = 155206652  # Па
σ_r1616.2 := (S_1616.2 - D_1616.2)/2 = 196099949  # Па
σ_t1617.2 := (S_1617.2 + D_1617.2)/2 = 156513731  # Па
σ_r1617.2 := (S_1617.2 - D_1617.2)/2 = 194792870  # Па
17
S_1717.2 := S_i1.i1.2(S_1617.2, D_1617.2, r_ср[17], r_ср[16], h[17], h[16]) = 335195158  # Па
D_1717.2 := D_i1.i1.2(S_1617.2, D_1617.2, r_ср[17], r_ср[16], h[17], h[16]) = -29547990  # Па
S_1718.2 := S_1717.2 = 335195158  # Па
D_1718.2 := D_i.i1.2(D_1717.2, r[18], r[17]) = -27717586  # Па
σ_t1717.2 := (S_1717.2 + D_1717.2)/2 = 152823584  # Па
σ_r1717.2 := (S_1717.2 - D_1717.2)/2 = 182371574  # Па
σ_t1718.2 := (S_1718.2 + D_1718.2)/2 = 153738786  # Па
σ_r1718.2 := (S_1718.2 - D_1718.2)/2 = 181456372  # Па
18
S_1818.2 := S_i1.i1.2(S_1718.2, D_1718.2, r_ср[18], r_ср[17], h[18], h[17]) = 314535954  # Па
D_1818.2 := D_i1.i1.2(S_1718.2, D_1718.2, r_ср[18], r_ср[17], h[18], h[17]) = -16722174  # Па
S_1819.2 := S_1818.2 = 314535954  # Па
D_1819.2 := D_i.i1.2(D_1818.2, r[19], r[18]) = -15717403  # Па
σ_t1818.2 := (S_1818.2 + D_1818.2)/2 = 148906890  # Па
σ_r1818.2 := (S_1818.2 - D_1818.2)/2 = 165629064  # Па
σ_t1819.2 := (S_1819.2 + D_1819.2)/2 = 149409275  # Па
σ_r1819.2 := (S_1819.2 - D_1819.2)/2 = 165126678  # Па
19
S_1919.2 := S_i1.i1.2(S_1819.2, D_1819.2, r_ср[19], r_ср[18], h[19], h[18]) = 314357337  # Па
D_1919.2 := D_i1.i1.2(S_1819.2, D_1819.2, r_ср[19], r_ср[18], h[19], h[18]) = -15896019  # Па
S_1920.2 := S_1919.2 = 314357337  # Па
D_1920.2 := D_i.i1.2(D_1919.2, r[20], r[19]) = -14968740  # Па
σ_t1919.2 := (S_1919.2 + D_1919.2)/2 = 149230659  # Па
σ_r1919.2 := (S_1919.2 - D_1919.2)/2 = 165126678  # Па
σ_t1920.2 := (S_1920.2 + D_1920.2)/2 = 149694299  # Па
σ_r1920.2 := (S_1920.2 - D_1920.2)/2 = 164663039  # Па
k := (p_m - σ_r1920)/σ_r1920.2 = 3.91287  # коэффициент изменения второго расчета
σ_r11 := σ_r11 + k*σ_r11.2
σ_r12 := σ_r12 + k*σ_r12.2
σ_t11 := σ_t11 + k*σ_t11.2
σ_r22 := σ_r22 + k*σ_r22.2
σ_r23 := σ_r23 + k*σ_r23.2
σ_t22 := σ_t22 + k*σ_t22.2
σ_r33 := σ_r33 + k*σ_r33.2
σ_r34 := σ_r34 + k*σ_r34.2
σ_t33 := σ_t33 + k*σ_t33.2
σ_r44 := σ_r44 + k*σ_r44.2
σ_r45 := σ_r45 + k*σ_r45.2
σ_t44 := σ_t44 + k*σ_t44.2
σ_r55 := σ_r55 + k*σ_r55.2
σ_r56 := σ_r56 + k*σ_r56.2
σ_t55 := σ_t55 + k*σ_t55.2
σ_r66 := σ_r66 + k*σ_r66.2
σ_r67 := σ_r67 + k*σ_r67.2
σ_t66 := σ_t66 + k*σ_t66.2
σ_r77 := σ_r77 + k*σ_r77.2
σ_r78 := σ_r78 + k*σ_r78.2
σ_t77 := σ_t77 + k*σ_t77.2
σ_r88 := σ_r88 + k*σ_r88.2
σ_r89 := σ_r89 + k*σ_r89.2
σ_t88 := σ_t88 + k*σ_t88.2
σ_r99 := σ_r99 + k*σ_r99.2
σ_r910 := σ_r910 + k*σ_r910.2
σ_t99 := σ_t99 + k*σ_t99.2
σ_r1010 := σ_r1010 + k*σ_r1010.2
σ_r1011 := σ_r1011 + k*σ_r1011.2
σ_t1010 := σ_t1010 + k*σ_t1010.2
σ_r1111 := σ_r1111 + k*σ_r1111.2
σ_r1112 := σ_r1112 + k*σ_r1112.2
σ_t1111 := σ_t1111 + k*σ_t1111.2
σ_r1212 := σ_r1212 + k*σ_r1212.2
σ_r1213 := σ_r1213 + k*σ_r1213.2
σ_t1212 := σ_t1212 + k*σ_t1212.2
σ_r1313 := σ_r1313 + k*σ_r1313.2
σ_r1314 := σ_r1314 + k*σ_r1314.2
σ_t1313 := σ_t1313 + k*σ_t1313.2
σ_r1414 := σ_r1414 + k*σ_r1414.2
σ_r1415 := σ_r1415 + k*σ_r1415.2
σ_t1414 := σ_t1414 + k*σ_t1414.2
σ_r1515 := σ_r1515 + k*σ_r1515.2
σ_r1516 := σ_r1516 + k*σ_r1516.2
σ_t1515 := σ_t1515 + k*σ_t1515.2
σ_r1616 := σ_r1616 + k*σ_r1616.2
σ_r1617 := σ_r1617 + k*σ_r1617.2
σ_t1616 := σ_t1616 + k*σ_t1616.2
σ_r1717 := σ_r1717 + k*σ_r1717.2
σ_r1718 := σ_r1718 + k*σ_r1718.2
σ_t1717 := σ_t1717 + k*σ_t1717.2
σ_r1818 := σ_r1818 + k*σ_r1818.2
σ_r1819 := σ_r1819 + k*σ_r1819.2
σ_t1818 := σ_t1818 + k*σ_t1818.2
σ_r1919 := σ_r1919 + k*σ_r1919.2
σ_r1920 := σ_r1920 + k*σ_r1920.2
σ_t1919 := σ_t1919 + k*σ_t1919.2
σ_t12 := σ_t12 + k*σ_t12.2
σ_t1213 := σ_t1213 + k*σ_t1213.2
σ_t23 := σ_t23 + k*σ_t23.2
σ_t1314 := σ_t1314 + k*σ_t1314.2
σ_t34 := σ_t34 + k*σ_t34.2
σ_t1415 := σ_t1415 + k*σ_t1415.2
σ_t45 := σ_t45 + k*σ_t45.2
σ_t1516 := σ_t1516 + k*σ_t1516.2
σ_t56 := σ_t56 + k*σ_t56.2
σ_t1617 := σ_t1617 + k*σ_t1617.2
σ_t67 := σ_t67 + k*σ_t67.2
σ_t1718 := σ_t1718 + k*σ_t1718.2
σ_t78 := σ_t78 + k*σ_t78.2
σ_t1819 := σ_t1819 + k*σ_t1819.2
σ_t89 := σ_t89 + k*σ_t89.2
σ_t1920 := σ_t1920 + k*σ_t1920.2
σ_t910 := σ_t910 + k*σ_t910.2
σ_t1011 := σ_t1011 + k*σ_t1011.2
σ_t1112 := σ_t1112 + k*σ_t1112.2
σ := [
    σ_r11, σ_r11, σ_t11, σ_t11, σ_r11, σ_t11;
    σ_r12, σ_r22, σ_t12, σ_t22, (σ_r12 + σ_r22)/2, (σ_t12 + σ_t22)/2;
    σ_r23, σ_r33, σ_t23, σ_t33, (σ_r23 + σ_r33)/2, (σ_t23 + σ_t33)/2;
    σ_r34, σ_r44, σ_t34, σ_t44, (σ_r34 + σ_r44)/2, (σ_t34 + σ_t44)/2;
    σ_r45, σ_r55, σ_t45, σ_t55, (σ_r45 + σ_r55)/2, (σ_t45 + σ_t55)/2;
    σ_r56, σ_r66, σ_t56, σ_t66, (σ_r56 + σ_r66)/2, (σ_t56 + σ_t66)/2;
    σ_r67, σ_r77, σ_t67, σ_t77, (σ_r67 + σ_r77)/2, (σ_t67 + σ_t77)/2;
    σ_r78, σ_r88, σ_t78, σ_t88, (σ_r78 + σ_r88)/2, (σ_t78 + σ_t88)/2;
    σ_r89, σ_r99, σ_t89, σ_t99, (σ_r89 + σ_r99)/2, (σ_t89 + σ_t99)/2;
    σ_r910, σ_r1010, σ_t910, σ_t1010, (σ_r910 + σ_r1010)/2, (σ_t910 + σ_t1010)/2;
    σ_r1011, σ_r1111, σ_t1011, σ_t1111, (σ_r1011 + σ_r1111)/2, (σ_t1011 + σ_t1111)/2;
    σ_r1112, σ_r1212, σ_t1112, σ_t1212, (σ_r1112 + σ_r1212)/2, (σ_t1112 + σ_t1212)/2;
    σ_r1213, σ_r1313, σ_t1213, σ_t1313, (σ_r1213 + σ_r1313)/2, (σ_t1213 + σ_t1313)/2;
    σ_r1314, σ_r1414, σ_t1314, σ_t1414, (σ_r1314 + σ_r1414)/2, (σ_t1314 + σ_t1414)/2;
    σ_r1415, σ_r1515, σ_t1415, σ_t1515, (σ_r1415 + σ_r1515)/2, (σ_t1415 + σ_t1515)/2;
    σ_r1516, σ_r1616, σ_t1516, σ_t1616, (σ_r1516 + σ_r1616)/2, (σ_t1516 + σ_t1616)/2;
    σ_r1617, σ_r1717, σ_t1617, σ_t1717, (σ_r1617 + σ_r1717)/2, (σ_t1617 + σ_t1717)/2;
    σ_r1718, σ_r1818, σ_t1718, σ_t1818, (σ_r1718 + σ_r1818)/2, (σ_t1718 + σ_t1818)/2;
    σ_r1819, σ_r1819, σ_t1819, σ_t1819, (σ_r1819 + σ_r1919)/2, (σ_t1819 + σ_t1919)/2;
    σ_r1920, σ_r1920, σ_t1920, σ_t1920, σ_r1920, σ_t1920
]
σ := σ/10^6 = [
    0, 0, 736.931, 736.931, 0, 736.931;
    139.348, 145.145, 509.059, 510.787, 142.246, 509.923;
    158.296, 183.604, 465.763, 480.015, 170.95, 472.889;
    190.268, 236.762, 437.857, 461.923, 213.515, 449.89;
    237.486, 298.514, 422.04, 449.947, 268, 435.993;
    293.73, 353.075, 411.862, 435.559, 323.403, 423.71;
    343.525, 373.683, 398.487, 408.937, 358.604, 403.712;
    360.833, 375.904, 371.368, 375.975, 368.369, 373.672;
    360.562, 375.733, 337.06, 341.44, 368.148, 339.25;
    358.092, 373.382, 300.942, 305.076, 365.737, 303.009;
    353.591, 368.862, 262.804, 266.618, 361.226, 264.711;
    347.04, 362.135, 222.41, 225.821, 354.588, 224.115;
    338.38, 361.336, 179.538, 184.08, 349.858, 181.809;
    308.295, 336.403, 84.8538, 88.2131, 322.349, 86.5334;
    276.369, 293.907, -20.5466, -20.9765, 285.138, -20.7616;
    261.395, 271.845, -79.1585, -80.7515, 266.62, -79.955;
    237.713, 230.099, -141.565, -137.901, 233.906, -139.733;
    195.09, 189.3, -202.131, -195.41, 192.195, -198.77;
    153.385, 153.385, -263.066, -263.066, 153.385, -262.77;
    116.153, 116.153, -333.184, -333.184, 116.153, -333.184
]
σ_экв := [
    max(σ[1, 5], σ[1, 6], 0) - min(σ[1, 5], σ[1, 6], 0);
    max(σ[2, 5], σ[2, 6], 0) - min(σ[2, 5], σ[2, 6], 0);
    max(σ[3, 5], σ[3, 6], 0) - min(σ[3, 5], σ[3, 6], 0);
    max(σ[4, 5], σ[4, 6], 0) - min(σ[4, 5], σ[4, 6], 0);
    max(σ[5, 5], σ[5, 6], 0) - min(σ[5, 5], σ[5, 6], 0);
    max(σ[6, 5], σ[6, 6], 0) - min(σ[6, 5], σ[6, 6], 0);
    max(σ[7, 5], σ[7, 6], 0) - min(σ[7, 5], σ[7, 6], 0);
    max(σ[8, 5], σ[8, 6], 0) - min(σ[8, 5], σ[8, 6], 0);
    max(σ[9, 5], σ[9, 6], 0) - min(σ[9, 5], σ[9, 6], 0);
    max(σ[10, 5], σ[10, 6], 0) - min(σ[10, 5], σ[10, 6], 0);
    max(σ[11, 5], σ[11, 6], 0) - min(σ[11, 5], σ[11, 6], 0);
    max(σ[12, 5], σ[12, 6], 0) - min(σ[12, 5], σ[12, 6], 0);
    max(σ[13, 5], σ[13, 6], 0) - min(σ[13, 5], σ[13, 6], 0);
    max(σ[14, 5], σ[14, 6], 0) - min(σ[14, 5], σ[14, 6], 0);
    max(σ[15, 5], σ[15, 6], 0) - min(σ[15, 5], σ[15, 6], 0);
    max(σ[16, 5], σ[16, 6], 0) - min(σ[16, 5], σ[16, 6], 0);
    max(σ[17, 5], σ[17, 6], 0) - min(σ[17, 5], σ[17, 6], 0);
    max(σ[18, 5], σ[18, 6], 0) - min(σ[18, 5], σ[18, 6], 0);
    max(σ[19, 5], σ[19, 6], 0) - min(σ[19, 5], σ[19, 6], 0);
    max(σ[20, 5], σ[20, 6], 0) - min(σ[20, 5], σ[20, 6], 0)
]
σ_экв = [736.931; 509.923; 472.889; 449.89; 435.993; 423.71; 403.712; 373.672; 368.148; 365.737; 361.226; 354.588; 349.858; 322.349; 305.9; 346.575; 373.638; 390.966; 416.156; 449.337]
МПа
# σ[r] | σ[t] | σ[экв]
σ1 := [
    σ[1, 5], σ[1, 6], σ_экв[1];
    σ[2, 5], σ[2, 6], σ_экв[2];
    σ[3, 5], σ[3, 6], σ_экв[3];
    σ[4, 5], σ[4, 6], σ_экв[4];
    σ[5, 5], σ[5, 6], σ_экв[5];
    σ[6, 5], σ[6, 6], σ_экв[6];
    σ[7, 5], σ[7, 6], σ_экв[7];
    σ[8, 5], σ[8, 6], σ_экв[8];
    σ[9, 5], σ[9, 6], σ_экв[9];
    σ[10, 5], σ[10, 6], σ_экв[10];
    σ[11, 5], σ[11, 6], σ_экв[11];
    σ[12, 5], σ[12, 6], σ_экв[12];
    σ[13, 5], σ[13, 6], σ_экв[13];
    σ[14, 5], σ[14, 6], σ_экв[14];
    σ[15, 5], σ[15, 6], σ_экв[15];
    σ[16, 5], σ[16, 6], σ_экв[16];
    σ[17, 5], σ[17, 6], σ_экв[17];
    σ[18, 5], σ[18, 6], σ_экв[18];
    σ[19, 5], σ[19, 6], σ_экв[19];
    σ[20, 5], σ[20, 6], σ_экв[20]
] = [
    0, 736.931, 736.931;
    142.246, 509.923, 509.923;
    170.95, 472.889, 472.889;
    213.515, 449.89, 449.89;
    268, 435.993, 435.993;
    323.403, 423.71, 423.71;
    358.604, 403.712, 403.712;
    368.369, 373.672, 373.672;
    368.148, 339.25, 368.148;
    365.737, 303.009, 365.737;
    361.226, 264.711, 361.226;
    354.588, 224.115, 354.588;
    349.858, 181.809, 349.858;
    322.349, 86.5334, 322.349;
    285.138, -20.7616, 305.9;
    266.62, -79.955, 346.575;
    233.906, -139.733, 373.638;
    192.195, -198.77, 390.966;
    153.385, -262.77, 416.156;
    116.153, -333.184, 449.337
]
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# Рис. 16. Эпюры касательных, радиальных и эквивалентных напряжений.
# Предел временной прочности ХН67МВТЮ :
σ_в.c := [1020; 940; 850; 560; 400]
T_c := [293; 870; 970; 1070; 1120]
T_1 := 290, 300 .. 1120
σ_в(T_1) := linterp(T_c, σ_в.c, T_1)
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# Рис. 17. Предел временной прочности ХН67МВТЮ в зависимости от температуры.
i := 1, 2 .. 20
# Построим распределение предела временной прочности по высоте диска согласно распределению температур:
σ_в.r[i] := σ_в(T_r(r[i]))
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# Рис. 18. Распределение временной прочности по высоте диска.
# Запас по временной прочности:
n_в[i] := σ_в.r[i]/σ_экв[i]
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# Рис. 19. Распределение запаса по временной прочности по высоте диска.
# Предел временной прочности на наиболее напряженном участке, на радиусе r.1:
n_в[1] = 1.31695
# Рассчитаем запас по разрушающей частоте вращения.
#
# Функция изменения толщины диска по радиусу:
h_д(r_д) := linterp(r, h1, r_д)
r_д := 0.044, 0.045 .. 0.197
σ_в(r_д) := linterp(r, σ_в.r, r_д)
# Момент инерции половины диска:
I := 2*integral(h_д(r_д)*r_д^2, r_д = r_1 .. r_m) = 0.000616841  # кг*м^2
n_разр == ω_разр/ω_твд
n_разр := sqrt(integral(h_д(r_д)*σ_в(r_д)*10^6, r_д = r_1 .. r_m)/(p_m*r_m*h_m1 + ρ*ω_твд^2*I)) = 1.11792
